# encoding: utf-8

import os, sys

print(sys.version)
print(sys.executable)
import numpy as np
import timeit
import Sofa
from splib.animation import animate, AnimationManager

class SceneDefinition:
    """This class handles the scene creation of the robot model"""
    def __init__(self, rootNode, design=np.zeros([1,1,1]), meshFolder="",
                 poissonRatio=0.3, youngModulus= 18000, totalMass = 1.0,
                 dt=0.001, with_gui = True, debug=False):
        """initialize the class"""
        properties = [
            {'name': 'rootNode', 'type': 'sofa node', 'help': 'root node', 'default': ''},
            {'name': 'meshFolder', 'type': 'string', 'help': 'Path to volume mesh and cavity files', 'default': ''},
            {'name': 'design', 'type': 'ndarray', 'help': 'numpy array specifying design, coords -1 solid, 0 cavity', 'default': 'np.zeros([1,1,1])'},
            {'name': 'dt', 'type': 'double', 'help': 'time step', 'default': 0.001},
            {'name': 'poissonRatio', 'type': 'double', 'help': 'Poisson ratio', 'default': 0.3},
            {'name': 'youngModulus', 'type': 'double', 'help': "Young's modulus", 'default': 18000.0},
            {'name': 'totalMass', 'type': 'double', 'help': 'Total mass', 'default': 1.0}]

        # design as described in the sim wrapper
        self.design = design
        self.rootNode = rootNode
        self.meshFolder = meshFolder
        self.poissonRatio = poissonRatio
        self.youngModulus = youngModulus
        self.totalMass = totalMass
        self.with_gui = with_gui
        self.debug = debug

        # this is the position and orientation of the robot. It is not fully
        # implemented so I think it is bedst to leave it as is.
        self.rotation = [0.0, 0.0, 0.0]
        self.translation = [0.0, 0.0, 0.0]

        # this will be the base of the robot in the scene graph
        self.volume = None

        # these two lines replace:
        #from stlib3.scene import Scene
        #Scene(self.rootNode, gravity=[0, 0.0, 0], dt=dt)
        #to remove the dependency
        try:
            self.rootNode.gravity.value = [0.0,0.0,0.0]
            self.rootNode.dt.value = dt
        except AttributeError:
            self.rootNode.gravity = "0.0 0.0 0.0"
            self.rootNode.dt = str(dt)


        required_plugins = ['SofaTopologyMapping', 'SofaOpenglVisual', 'SofaSparseSolver', 'SofaConstraint',
                            'SofaGeneralLoader']
        required_plugins = ['SoftRobots']
        print("HERE")
        for i in required_plugins:
            self.rootNode.createObject("RequiredPlugin", name='req_p' + i, pluginName=i)


        print("HERE")
        # create all the material and cavities
        self.place_materials_and_cavities_and_solvers()

        print("Materials placed")
        # fix the base (all nodes where z=0)
        self.fix_z()

        print("HERE")
    def fix_z(self):
        '''Fix all vertexes in mesh where z=0, this is so that one the robot doesn't
        fly off to infinity if it gets pushed a little bit, and two so it has something
        to push against while for now: it does simple shape rewards'''
        '''
        vertexes = self.rootNode.volume.loader.position.array()
        fix_string = " "
        for i, pos in enumerate(vertexes):
            if -0.01 <= pos[2] <= 0.01:
                # print(i,pos)

                fix_string = fix_string + " " + str(i)
        '''
        fix_string = "11 22 43 84 165 309 442 488 521 559 561 599 601 624"
        # print("FIXED POINTS", fix_string)
        # this adds a constraint that fixes these vertexes
        self.volume.createObject("FixedConstraint", drawSize=1.0, indices=fix_string)


    def place_materials_and_cavities_and_solvers(self):
        """Place solid elastic material and cavities"""


        print("Couldne't add an object")
        # linear solver (with parameters from example file)
        self.rootNode.createObject('GenericConstraintSolver', name='gencs', maxIterations='500', printLog='0',
                                tolerance='0.0000001')
        print("added an object")
        # self.volume is the elastic material
        self.volume = self.rootNode.createChild('volume')
        print("added volume")
        self.volume.createObject('MeshGmshLoader', name='loader', filename=self.meshFolder+"volume.msh",
                            rotation=self.rotation, translation=self.translation, scale3d=[1.0,1.0,1.0])


        print("THINGS ARE LOADED", self.meshFolder)
        # Load solvers and animation loop
        # These determine how the simulation moves from one step to the next.
        # the EulerImplicitSolver (I believe) sets up the equations and the
        # SparseLDLSolver is what actually solves them
        # FreeMotionAnimationLoop enables legrangian methods for constraints
        self.rootNode.createObject('FreeMotionAnimationLoop')
        self.rootNode.createObject( 'EulerImplicitSolver', name='integration')
        self.rootNode.createObject( 'SparseLDLSolver', name="solver")


        # specify solid mechanics
        self.volume.createObject('TetrahedronSetTopologyContainer', src="@loader", name="container")
        self.volume.createObject('MechanicalObject', template='Vec3d', name='dofs')
        self.volume.createObject('UniformMass', totalMass=self.totalMass, name='mass')
        # if we wanted to do a Neo-Hookean Solid we would do that at this line.
        self.volume.createObject('TetrahedronFEMForceField', template='Vec3d', method='large', name='forcefield',
                                 poissonRatio=self.poissonRatio, youngModulus=self.youngModulus)
        # Constraint solver for corrections, this is how forces between the
        # pressurized cavities are applied to the solid
        self.volume.createObject('LinearSolverConstraintCorrection', template='Vec3d', solverName='../solver')

        # add the cavities
        for ijk in np.ndindex(self.design.shape):
            # if this section is marked as a cavity, create one with the correct index
            if self.design[ijk] == 0:
                i, j, k = ijk
                node_name = 'cavity_' + str(i) + '_' + str(j) + '_' + str(k)
                cavity = self.volume.createChild(node_name)

                # load the specific file, it should be at the correct coordinates and match with a corrisponding
                # one in the volume
                cavity.createObject('MeshSTLLoader', name='loader',
                                 filename=self.meshFolder + node_name + '.stl',
                                 translation=self.translation, rotation=self.rotation)
                cavity.createObject('Mesh', src='@loader', name='topo')
                cavity.createObject('MechanicalObject', name=node_name)
                # this pressure constraint is how the cavity is actually controlled
                cavity.createObject('SurfacePressureConstraint',   name="SurfacePressureConstraint",    template='Vec3d', value="7.0001",   triangles='@topo.triangles', drawPressure='0',  drawScale='0.0002', valueType="pressure")
                cavity.createObject('BarycentricMapping', name='mapping',
                                 mapForces='false', mapMasses='false')

        if self.with_gui:
            # add visualization for when it is running in a gui.
            self.rootNode.createObject('VisualStyle',
                                    displayFlags='showVisualModels hideBehaviorModels showCollisionModels ' +
                                                 'hideBoundingCollisionModels hideForceFields showInteractionForceFields hideWireframe')

            robotVisu = self.volume.createChild('robotvisu')
            robotVisu.createObject('TriangleSetTopologyContainer', name='container')
            robotVisu.createObject('TriangleSetTopologyModifier')

            robotVisu.createObject('TriangleSetGeometryAlgorithms', template='Vec3d')
            robotVisu.createObject('Tetra2TriangleTopologicalMapping', name='Mapping', input="@../container",
                                output="@container")
            robotVisu.createObject('OglModel', template='Vec3d', color='0.3 0.2 0.2 0.6', translation=self.translation)
            robotVisu.createObject('IdentityMapping')
            self.rootNode.createObject('BackgroundSetting', color='0 0.168627 0.211765')


    def action(self, act):
        # For now the action will be a 3d matrix, same dim as disign
        for ijk in np.ndindex(self.design.shape):
            # if this section is marked as a cavity, create one with the correct index
            if self.design[ijk] == 0:
                i, j, k = ijk

                node_name = 'cavity_' + str(i) + '_' + str(j) + '_' + str(k)
                self.rootNode.volume.cavity_0_0_0.SurfacePressureConstraint.value = act[ijk]

                #with self.rootNode["volume." + node_name  + ".SurfacePressureConstraint.value"].writeableArray() as wa:
                #    wa[0] = act[ijk]

    def observation(self):

        return self.rootNode.volume.dofs.position


def createScene(rootNode):


    meshpath = '/home/sofauser/workdir/simple_control_policy/one_cell_robot_mesh/'

    # it is 1x1x2 with a cavity in both positions
    #design = np.array([[[0, 0]]])
    design = np.array([[[ 0]]])
    ac = np.linspace(0, 7, 1000)
    obs_s = []
    def my_animation(target, scn, factor):
        # this animation makes the two cavities oscillate at different
        # frequencies
        action = np.array([[[3*np.sin(factor*np.pi*2),
                               3*np.sin(3*factor*np.pi*2)]]])
        action = np.array([[[3 * np.sin(factor * np.pi * 2),]]])
        a = scn.observation()[82]


        if scn.cnt < len(ac):


            obs_s.append(np.array(a))
            action = action - action + ac[scn.cnt]
            scn.cnt += 1

        else:
            print(obs_s)
            np.save('obs.npy', np.array(obs_s))
            action = action - action

        scn.action(action)


        print("State: ", np.linalg.norm(a)-2.0, " action: ", action, ' obs ', obs_s[-1] )

    def ExitFunc(target, scn, factor):

        print("Done with animation")
        exit()

    scn = SceneDefinition(rootNode, design=design, meshFolder=meshpath, with_gui=True)

    # these two lines hook the animation function defined above to the scene graph
    # and makes it so it is run at every time step.

    AnimationManager(rootNode)
    scn.cnt = 0
    animate(my_animation, {"target": rootNode, "scn":scn}, duration=1, mode="once", onDone=ExitFunc)

    return rootNode
